<Lems>

    <!--

        This LEMS file has been automatically generated using PyNeuroML v0.5.18 (libNeuroML v0.2.58)

     -->

    <!-- Specify which component to run -->
    <Target component="Sim_HHSmall"/>

    <!-- Include core NeuroML2 ComponentType definitions -->
    <Include file="Cells.xml"/>
    <Include file="Networks.xml"/>
    <Include file="Simulation.xml"/>

    <Include file="HHSmall.net.nml"/>

    <Simulation id="Sim_HHSmall" length="300.0ms" step="0.0025ms" target="HHSmall" seed="12345">  <!-- Note seed: ensures same random numbers used every run -->

        <Display id="DispPop__PYR" title="Membrane potentials of cells in PYR" timeScale="1ms" xmin="-30.0" xmax="330.0" ymin="-90" ymax="50">
            <Line id="PYR[0]: v" quantity="PYR/0/CELL_HH_PYR/v" scale="1mV" color="#d54f33" timeScale="1ms"/>
            <Line id="PYR[1]: v" quantity="PYR/1/CELL_HH_PYR/v" scale="1mV" color="#0534e4" timeScale="1ms"/>
            <Line id="PYR[2]: v" quantity="PYR/2/CELL_HH_PYR/v" scale="1mV" color="#98e752" timeScale="1ms"/>
        </Display>

        <OutputFile id="Volts_file__PYR" fileName="Sim_HHSmall.PYR.v.dat">
            <OutputColumn id="v_PYR_0_CELL_HH_PYR_v" quantity="PYR/0/CELL_HH_PYR/v"/>
            <OutputColumn id="v_PYR_1_CELL_HH_PYR_v" quantity="PYR/1/CELL_HH_PYR/v"/>
            <OutputColumn id="v_PYR_2_CELL_HH_PYR_v" quantity="PYR/2/CELL_HH_PYR/v"/>
        </OutputFile>

    </Simulation>

</Lems>
