<neuroml xmlns="http://www.neuroml.org/schema/neuroml2"  xmlns:xs="http://www.w3.org/2001/XMLSchema" xmlns:xsi="http://www.w3.org/2001/XMLSchema-instance" xsi:schemaLocation="http://www.neuroml.org/schema/neuroml2 https://raw.github.com/NeuroML/NeuroML2/development/Schemas/NeuroML2/NeuroML_v2.3.xsd" id="M1">
    <notes>NeuroML 2 file exported from NetPyNE v1.0.3.1</notes>
    <expTwoSynapse id="AMPA" gbase="1uS" erev="0mV" tauDecay="5.3ms" tauRise="0.05ms"/>
    <expTwoSynapse id="NMDA" gbase="1uS" erev="0mV" tauDecay="15ms" tauRise="0.15ms"/>
    <expTwoSynapse id="GABAA" gbase="1uS" erev="-80mV" tauDecay="9.1ms" tauRise="0.07ms"/>
    <expTwoSynapse id="GABAB" gbase="1uS" erev="-80mV" tauDecay="9.1ms" tauRise="0.07ms"/>
    <izhikevich2007Cell id="CELL_IT" C="100 pF" v0="-60 mV" k="0.7 nS_per_mV" vr="-60 mV" vt="-40 mV" vpeak="35 mV" a="0.03 per_ms" b="-2 nS" c="-50 mV" d="100 pA"/>
    <izhikevich2007Cell id="CELL_PT" C="150.0 pF" v0="-75 mV" k="1.2 nS_per_mV" vr="-75 mV" vt="-45 mV" vpeak="50 mV" a="0.01 per_ms" b="5 nS" c="-56 mV" d="130 pA"/>
    <izhikevich2007Cell id="CELL_CT" C="100 pF" v0="-60 mV" k="0.7 nS_per_mV" vr="-60 mV" vt="-40 mV" vpeak="35 mV" a="0.03 per_ms" b="-2 nS" c="-50 mV" d="100 pA"/>
    <izhikevich2007Cell id="CELL_PV" C="20.0 pF" v0="-55 mV" k="1.0 nS_per_mV" vr="-55 mV" vt="-40 mV" vpeak="25 mV" a="0.2 per_ms" b="-2 nS" c="-45 mV" d="-55 pA"/>
    <izhikevich2007Cell id="CELL_SOM" C="100.0 pF" v0="-56 mV" k="1.0 nS_per_mV" vr="-56 mV" vt="-42 mV" vpeak="40 mV" a="0.03 per_ms" b="8 nS" c="-53 mV" d="20 pA"/>
    <spikeGeneratorPoisson id="NetStim_background_E_IT_L23_20_1_NMDA" averageRate="20 Hz"/>
    <spikeGeneratorPoisson id="NetStim_background_E_IT_L4_20_1_NMDA" averageRate="20 Hz"/>
    <spikeGeneratorPoisson id="NetStim_background_E_IT_L5A_20_1_NMDA" averageRate="20 Hz"/>
    <spikeGeneratorPoisson id="NetStim_background_E_IT_L5B_20_1_NMDA" averageRate="20 Hz"/>
    <spikeGeneratorPoisson id="NetStim_background_E_PT_L5B_20_1_NMDA" averageRate="20 Hz"/>
    <spikeGeneratorPoisson id="NetStim_background_E_IT_L6_20_1_NMDA" averageRate="20 Hz"/>
    <spikeGeneratorPoisson id="NetStim_background_E_CT_L6_20_1_NMDA" averageRate="20 Hz"/>
    <spikeGeneratorPoisson id="NetStim_background_E_PV_L23_20_1_NMDA" averageRate="20 Hz"/>
    <spikeGeneratorPoisson id="NetStim_background_E_SOM_L23_20_1_NMDA" averageRate="20 Hz"/>
    <spikeGeneratorPoisson id="NetStim_background_E_PV_L5_20_1_NMDA" averageRate="20 Hz"/>
    <spikeGeneratorPoisson id="NetStim_background_E_SOM_L5_20_1_NMDA" averageRate="20 Hz"/>
    <spikeGeneratorPoisson id="NetStim_background_E_PV_L6_20_1_NMDA" averageRate="20 Hz"/>
    <spikeGeneratorPoisson id="NetStim_background_E_SOM_L6_20_1_NMDA" averageRate="20 Hz"/>
    <network id="M1">
        <population id="IT_L23" component="CELL_IT" size="51" type="populationList">
            <property tag="radius" value="5"/>
            <instance id="0">
                <location x="33.335887237140938" y="312.742451868312742" z="23.50954373285418"/>
            </instance>
            <instance id="1">
                <location x="39.275630775542083" y="312.31536542640174" z="49.901946599152417"/>
            </instance>
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        </population>
        <population id="IT_L4" component="CELL_IT" size="26" type="populationList">
            <property tag="radius" value="5"/>
            <instance id="0">
                <location x="17.386634469175096" y="423.815386514338854" z="11.397751767328533"/>
            </instance>
            <instance id="1">
                <location x="36.945173217229268" y="517.315520687770118" z="33.057078397121032"/>
            </instance>
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        </population>
        <population id="IT_L5A" component="CELL_IT" size="29" type="populationList">
            <property tag="radius" value="5"/>
            <instance id="0">
                <location x="1.919020385965933" y="665.476017034967413" z="40.281073180893188"/>
            </instance>
            <instance id="1">
                <location x="4.403480723406309" y="649.474369906942798" z="14.343996831601485"/>
            </instance>
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        </population>
        <population id="IT_L5B" component="CELL_IT" size="33" type="populationList">
            <property tag="radius" value="5"/>
            <instance id="0">
                <location x="43.467302947894829" y="738.809525097648248" z="30.268148127880846"/>
            </instance>
            <instance id="1">
                <location x="2.839714334616504" y="856.201992865022817" z="3.771727799025427"/>
            </instance>
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        </population>
        <population id="PT_L5B" component="CELL_PT" size="33" type="populationList">
            <property tag="radius" value="5"/>
            <instance id="0">
                <location x="0.833534204672665" y="855.456750729596934" z="14.393497965206976"/>
            </instance>
            <instance id="1">
                <location x="35.394865487377423" y="798.814409754747885" z="47.641950077926289"/>
            </instance>
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        </population>
        <population id="IT_L6" component="CELL_IT" size="31" type="populationList">
            <property tag="radius" value="5"/>
            <instance id="0">
                <location x="34.120741664869534" y="1315.796834661439789" z="45.1711707876131"/>
            </instance>
            <instance id="1">
                <location x="11.632115833546939" y="1043.212762220480499" z="20.736874029800092"/>
            </instance>
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        </population>
        <population id="CT_L6" component="CELL_CT" size="31" type="populationList">
            <property tag="radius" value="5"/>
            <instance id="0">
                <location x="3.958655089615226" y="1300.23295671825008" z="23.62227405569929"/>
            </instance>
            <instance id="1">
                <location x="49.295873916871876" y="1338.03911326929483" z="0.235635088701817"/>
            </instance>
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        </population>
        <population id="PV_L23" component="CELL_PV" size="7" type="populationList">
            <property tag="radius" value="5"/>
            <instance id="0">
                <location x="22.363584378649577" y="149.840399972549562" z="24.686610949065859"/>
            </instance>
            <instance id="1">
                <location x="12.565058129242376" y="264.559729987974322" z="32.077768996339813"/>
            </instance>
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        </population>
        <population id="SOM_L23" component="CELL_SOM" size="7" type="populationList">
            <property tag="radius" value="5"/>
            <instance id="0">
                <location x="39.405205312789136" y="346.899919582088501" z="21.997690125834733"/>
            </instance>
            <instance id="1">
                <location x="24.612879689174498" y="192.099585473979914" z="8.894376314968248"/>
            </instance>
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        </population>
        <population id="PV_L5" component="CELL_PV" size="15" type="populationList">
            <property tag="radius" value="5"/>
            <instance id="0">
                <location x="0.986292469085592" y="987.523261329619345" z="47.327739711076084"/>
            </instance>
            <instance id="1">
                <location x="36.115480508628423" y="603.351679889519801" z="46.28164550608917"/>
            </instance>
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        </population>
        <population id="SOM_L5" component="CELL_SOM" size="15" type="populationList">
            <property tag="radius" value="5"/>
            <instance id="0">
                <location x="13.389457246896471" y="1039.021870313789123" z="10.764657901421968"/>
            </instance>
            <instance id="1">
                <location x="36.586980222122051" y="875.112932921477295" z="19.547843369760585"/>
            </instance>
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        </population>
        <population id="PV_L6" component="CELL_PV" size="7" type="populationList">
            <property tag="radius" value="5"/>
            <instance id="0">
                <location x="32.745942326088915" y="1153.988812076396016" z="39.195109394100704"/>
            </instance>
            <instance id="1">
                <location x="18.532549364368304" y="1088.348198612837905" z="7.634454160548175"/>
            </instance>
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        </population>
        <population id="SOM_L6" component="CELL_SOM" size="7" type="populationList">
            <property tag="radius" value="5"/>
            <instance id="0">
                <location x="13.896505729319411" y="1247.369303866087193" z="5.872878419264946"/>
            </instance>
            <instance id="1">
                <location x="7.030452506842452" y="1249.166195723538749" z="3.656799869226106"/>
            </instance>
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        </population>
        <population id="Pop_NetStim_background_E_IT_L23_20_1_NMDA" component="NetStim_background_E_IT_L23_20_1_NMDA" size="51"/>
        <population id="Pop_NetStim_background_E_IT_L4_20_1_NMDA" component="NetStim_background_E_IT_L4_20_1_NMDA" size="26"/>
        <population id="Pop_NetStim_background_E_IT_L5A_20_1_NMDA" component="NetStim_background_E_IT_L5A_20_1_NMDA" size="29"/>
        <population id="Pop_NetStim_background_E_IT_L5B_20_1_NMDA" component="NetStim_background_E_IT_L5B_20_1_NMDA" size="33"/>
        <population id="Pop_NetStim_background_E_PT_L5B_20_1_NMDA" component="NetStim_background_E_PT_L5B_20_1_NMDA" size="33"/>
        <population id="Pop_NetStim_background_E_IT_L6_20_1_NMDA" component="NetStim_background_E_IT_L6_20_1_NMDA" size="31"/>
        <population id="Pop_NetStim_background_E_CT_L6_20_1_NMDA" component="NetStim_background_E_CT_L6_20_1_NMDA" size="31"/>
        <population id="Pop_NetStim_background_E_PV_L23_20_1_NMDA" component="NetStim_background_E_PV_L23_20_1_NMDA" size="7"/>
        <population id="Pop_NetStim_background_E_SOM_L23_20_1_NMDA" component="NetStim_background_E_SOM_L23_20_1_NMDA" size="7"/>
        <population id="Pop_NetStim_background_E_PV_L5_20_1_NMDA" component="NetStim_background_E_PV_L5_20_1_NMDA" size="15"/>
        <population id="Pop_NetStim_background_E_SOM_L5_20_1_NMDA" component="NetStim_background_E_SOM_L5_20_1_NMDA" size="15"/>
        <population id="Pop_NetStim_background_E_PV_L6_20_1_NMDA" component="NetStim_background_E_PV_L6_20_1_NMDA" size="7"/>
        <population id="Pop_NetStim_background_E_SOM_L6_20_1_NMDA" component="NetStim_background_E_SOM_L6_20_1_NMDA" size="7"/>
        <projection id="NetConn_IT_L23_IT_L23_AMPA" presynapticPopulation="IT_L23" postsynapticPopulation="IT_L23" synapse="AMPA">
            <connectionWD id="0" preCellId="../IT_L23/17/CELL_IT" postCellId="../IT_L23/0/CELL_IT" weight="0.022" delay="3.4090165124952216 ms"/>
            <connectionWD id="1" preCellId="../IT_L23/26/CELL_IT" postCellId="../IT_L23/0/CELL_IT" weight="0.022" delay="3.427398672596458 ms"/>
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        </projection>
        <projection id="NetConn_IT_L4_IT_L23_AMPA" presynapticPopulation="IT_L4" postsynapticPopulation="IT_L23" synapse="AMPA">
            <connectionWD id="0" preCellId="../IT_L4/1/CELL_IT" postCellId="../IT_L23/0/CELL_IT" weight="0.029" delay="4.048275441674335 ms"/>
            <connectionWD id="1" preCellId="../IT_L4/18/CELL_IT" postCellId="../IT_L23/0/CELL_IT" weight="0.029" delay="3.526590188177265 ms"/>
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        </projection>
        <projection id="NetConn_IT_L5B_IT_L23_AMPA" presynapticPopulation="IT_L5B" postsynapticPopulation="IT_L23" synapse="AMPA">
            <connectionWD id="0" preCellId="../IT_L5B/17/CELL_IT" postCellId="../IT_L23/0/CELL_IT" weight="0.013" delay="6.055569490370946 ms"/>
            <connectionWD id="1" preCellId="../IT_L5B/0/CELL_IT" postCellId="../IT_L23/1/CELL_IT" weight="0.013" delay="6.269664206839851 ms"/>
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        </projection>
        <projection id="NetConn_SOM_L23_IT_L23_GABAB" presynapticPopulation="SOM_L23" postsynapticPopulation="IT_L23" synapse="GABAB">
            <connectionWD id="0" preCellId="../SOM_L23/0/CELL_SOM" postCellId="../IT_L23/0/CELL_IT" weight="0.025" delay="2.34725421867129 ms"/>
            <connectionWD id="1" preCellId="../SOM_L23/2/CELL_SOM" postCellId="../IT_L23/0/CELL_IT" weight="0.025" delay="2.9489380106998495 ms"/>
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        </projection>
        <projection id="NetConn_PV_L23_IT_L23_GABAA" presynapticPopulation="PV_L23" postsynapticPopulation="IT_L23" synapse="GABAA">
            <connectionWD id="0" preCellId="../PV_L23/1/CELL_PV" postCellId="../IT_L23/0/CELL_IT" weight="0.025" delay="2.5316405283453665 ms"/>
            <connectionWD id="1" preCellId="../PV_L23/2/CELL_PV" postCellId="../IT_L23/0/CELL_IT" weight="0.025" delay="3.5474418619015022 ms"/>
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        </projection>
        <projection id="NetConn_IT_L5A_IT_L23_AMPA" presynapticPopulation="IT_L5A" postsynapticPopulation="IT_L23" synapse="AMPA">
            <connectionWD id="0" preCellId="../IT_L5A/19/CELL_IT" postCellId="../IT_L23/1/CELL_IT" weight="0.0335" delay="4.659620946586651 ms"/>
            <connectionWD id="1" preCellId="../IT_L5A/3/CELL_IT" postCellId="../IT_L23/3/CELL_IT" weight="0.024" delay="3.646216313326839 ms"/>
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        </projection>
        <projection id="NetConn_IT_L6_IT_L23_AMPA" presynapticPopulation="IT_L6" postsynapticPopulation="IT_L23" synapse="AMPA">
            <connectionWD id="0" preCellId="../IT_L6/1/CELL_IT" postCellId="../IT_L23/4/CELL_IT" weight="0.013" delay="8.50090009328478 ms"/>
            <connectionWD id="1" preCellId="../IT_L6/20/CELL_IT" postCellId="../IT_L23/11/CELL_IT" weight="0.013" delay="9.219758911851198 ms"/>
        </projection>
        <projection id="NetConn_CT_L6_IT_L23_AMPA" presynapticPopulation="CT_L6" postsynapticPopulation="IT_L23" synapse="AMPA">
            <connectionWD id="0" preCellId="../CT_L6/12/CELL_CT" postCellId="../IT_L23/18/CELL_IT" weight="0.0085" delay="8.309788923374583 ms"/>
        </projection>
        <projection id="NetConn_IT_L23_IT_L4_AMPA" presynapticPopulation="IT_L23" postsynapticPopulation="IT_L4" synapse="AMPA">
            <connectionWD id="0" preCellId="../IT_L23/39/CELL_IT" postCellId="../IT_L4/0/CELL_IT" weight="0.0155" delay="3.7689521001701163 ms"/>
            <connectionWD id="1" preCellId="../IT_L23/19/CELL_IT" postCellId="../IT_L4/0/CELL_IT" weight="0.018" delay="2.405981245786474 ms"/>
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        </projection>
        <projection id="NetConn_IT_L4_IT_L4_AMPA" presynapticPopulation="IT_L4" postsynapticPopulation="IT_L4" synapse="AMPA">
            <connectionWD id="0" preCellId="../IT_L4/3/CELL_IT" postCellId="../IT_L4/0/CELL_IT" weight="0.0475" delay="2.8883943259174827 ms"/>
            <connectionWD id="1" preCellId="../IT_L4/4/CELL_IT" postCellId="../IT_L4/0/CELL_IT" weight="0.0475" delay="2.5098534103677634 ms"/>
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        </projection>
        <projection id="NetConn_IT_L5A_IT_L4_AMPA" presynapticPopulation="IT_L5A" postsynapticPopulation="IT_L4" synapse="AMPA">
            <connectionWD id="0" preCellId="../IT_L5A/13/CELL_IT" postCellId="../IT_L4/0/CELL_IT" weight="0.024" delay="3.958811179957128 ms"/>
            <connectionWD id="1" preCellId="../IT_L5A/10/CELL_IT" postCellId="../IT_L4/1/CELL_IT" weight="0.032875" delay="2.49163875030287 ms"/>
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        </projection>
        <projection id="NetConn_CT_L6_IT_L4_AMPA" presynapticPopulation="CT_L6" postsynapticPopulation="IT_L4" synapse="AMPA">
            <connectionWD id="0" preCellId="../CT_L6/24/CELL_CT" postCellId="../IT_L4/0/CELL_IT" weight="0.0085" delay="8.391073400655387 ms"/>
            <connectionWD id="1" preCellId="../CT_L6/18/CELL_CT" postCellId="../IT_L4/2/CELL_IT" weight="0.002" delay="9.183573959536258 ms"/>
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        </projection>
        <projection id="NetConn_IT_L5B_IT_L4_AMPA" presynapticPopulation="IT_L5B" postsynapticPopulation="IT_L4" synapse="AMPA">
            <connectionWD id="0" preCellId="../IT_L5B/7/CELL_IT" postCellId="../IT_L4/0/CELL_IT" weight="0.0085" delay="5.57947246056407 ms"/>
            <connectionWD id="1" preCellId="../IT_L5B/7/CELL_IT" postCellId="../IT_L4/1/CELL_IT" weight="0.0085" delay="4.632214980350723 ms"/>
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        </projection>
        <projection id="NetConn_PT_L5B_IT_L4_AMPA" presynapticPopulation="PT_L5B" postsynapticPopulation="IT_L4" synapse="AMPA">
            <connectionWD id="0" preCellId="../PT_L5B/8/CELL_PT" postCellId="../IT_L4/0/CELL_IT" weight="0.0085" delay="6.4390750198647035 ms"/>
            <connectionWD id="1" preCellId="../PT_L5B/11/CELL_PT" postCellId="../IT_L4/1/CELL_IT" weight="0.01025" delay="4.384767143092613 ms"/>
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        </projection>
        <projection id="NetConn_IT_L6_IT_L4_AMPA" presynapticPopulation="IT_L6" postsynapticPopulation="IT_L4" synapse="AMPA">
            <connectionWD id="0" preCellId="../IT_L6/21/CELL_IT" postCellId="../IT_L4/0/CELL_IT" weight="0.00425" delay="8.56811505206985 ms"/>
            <connectionWD id="1" preCellId="../IT_L6/10/CELL_IT" postCellId="../IT_L4/1/CELL_IT" weight="0.002" delay="8.468735774365696 ms"/>
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        </projection>
        <projection id="NetConn_PV_L5_IT_L4_GABAA" presynapticPopulation="PV_L5" postsynapticPopulation="IT_L4" synapse="GABAA">
            <connectionWD id="0" preCellId="../PV_L5/5/CELL_PV" postCellId="../IT_L4/0/CELL_IT" weight="0.025" delay="2.3121107386781907 ms"/>
            <connectionWD id="1" preCellId="../PV_L5/6/CELL_PV" postCellId="../IT_L4/0/CELL_IT" weight="0.025" delay="2.8411910769988054 ms"/>
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        </projection>
        <projection id="NetConn_SOM_L5_IT_L4_GABAB" presynapticPopulation="SOM_L5" postsynapticPopulation="IT_L4" synapse="GABAB">
            <connectionWD id="0" preCellId="../SOM_L5/5/CELL_SOM" postCellId="../IT_L4/1/CELL_IT" weight="0.025" delay="2.437843864299151 ms"/>
            <connectionWD id="1" preCellId="../SOM_L5/5/CELL_SOM" postCellId="../IT_L4/2/CELL_IT" weight="0.025" delay="2.7259035211988722 ms"/>
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        </projection>
        <projection id="NetConn_IT_L23_IT_L5A_AMPA" presynapticPopulation="IT_L23" postsynapticPopulation="IT_L5A" synapse="AMPA">
            <connectionWD id="0" preCellId="../IT_L23/40/CELL_IT" postCellId="../IT_L5A/0/CELL_IT" weight="0.0275" delay="6.603833852732781 ms"/>
            <connectionWD id="1" preCellId="../IT_L23/14/CELL_IT" postCellId="../IT_L5A/1/CELL_IT" weight="0.0275" delay="6.564977782792496 ms"/>
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        </projection>
        <projection id="NetConn_IT_L5A_IT_L5A_AMPA" presynapticPopulation="IT_L5A" postsynapticPopulation="IT_L5A" synapse="AMPA">
            <connectionWD id="0" preCellId="../IT_L5A/4/CELL_IT" postCellId="../IT_L5A/0/CELL_IT" weight="0.033" delay="2.2959230916639557 ms"/>
            <connectionWD id="1" preCellId="../IT_L5A/12/CELL_IT" postCellId="../IT_L5A/0/CELL_IT" weight="0.033" delay="2.334847320887956 ms"/>
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        </projection>
        <projection id="NetConn_PT_L5B_IT_L5A_AMPA" presynapticPopulation="PT_L5B" postsynapticPopulation="IT_L5A" synapse="AMPA">
            <connectionWD id="0" preCellId="../PT_L5B/15/CELL_PT" postCellId="../IT_L5A/0/CELL_IT" weight="0.012" delay="2.768308860753932 ms"/>
            <connectionWD id="1" preCellId="../PT_L5B/16/CELL_PT" postCellId="../IT_L5A/0/CELL_IT" weight="0.012" delay="2.8734042270949343 ms"/>
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        </projection>
        <projection id="NetConn_IT_L5B_IT_L5A_AMPA" presynapticPopulation="IT_L5B" postsynapticPopulation="IT_L5A" synapse="AMPA">
            <connectionWD id="0" preCellId="../IT_L5B/4/CELL_IT" postCellId="../IT_L5A/0/CELL_IT" weight="0.012" delay="5.044837696706752 ms"/>
            <connectionWD id="1" preCellId="../IT_L5B/27/CELL_IT" postCellId="../IT_L5A/2/CELL_IT" weight="0.012" delay="4.841439945701133 ms"/>
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        </projection>
        <projection id="NetConn_IT_L6_IT_L5A_AMPA" presynapticPopulation="IT_L6" postsynapticPopulation="IT_L5A" synapse="AMPA">
            <connectionWD id="0" preCellId="../IT_L6/12/CELL_IT" postCellId="../IT_L5A/0/CELL_IT" weight="0.004" delay="8.599962860487306 ms"/>
            <connectionWD id="1" preCellId="../IT_L6/24/CELL_IT" postCellId="../IT_L5A/0/CELL_IT" weight="0.004" delay="8.418364460531912 ms"/>
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        </projection>
        <projection id="NetConn_SOM_L5_IT_L5A_GABAB" presynapticPopulation="SOM_L5" postsynapticPopulation="IT_L5A" synapse="GABAB">
            <connectionWD id="0" preCellId="../SOM_L5/7/CELL_SOM" postCellId="../IT_L5A/0/CELL_IT" weight="0.025" delay="2.847171146440555 ms"/>
            <connectionWD id="1" preCellId="../SOM_L5/10/CELL_SOM" postCellId="../IT_L5A/1/CELL_IT" weight="0.025" delay="2.885258319716332 ms"/>
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        </projection>
        <projection id="NetConn_PV_L5_IT_L5A_GABAA" presynapticPopulation="PV_L5" postsynapticPopulation="IT_L5A" synapse="GABAA">
            <connectionWD id="0" preCellId="../PV_L5/1/CELL_PV" postCellId="../IT_L5A/0/CELL_IT" weight="0.025" delay="2.711676753794305 ms"/>
            <connectionWD id="1" preCellId="../PV_L5/10/CELL_PV" postCellId="../IT_L5A/0/CELL_IT" weight="0.025" delay="2.536482966626361 ms"/>
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        </projection>
        <projection id="NetConn_IT_L4_IT_L5A_AMPA" presynapticPopulation="IT_L4" postsynapticPopulation="IT_L5A" synapse="AMPA">
            <connectionWD id="0" preCellId="../IT_L4/11/CELL_IT" postCellId="../IT_L5A/1/CELL_IT" weight="0.027" delay="3.6363434351529054 ms"/>
            <connectionWD id="1" preCellId="../IT_L4/21/CELL_IT" postCellId="../IT_L5A/1/CELL_IT" weight="0.027" delay="3.6151295177088825 ms"/>
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        </projection>
        <projection id="NetConn_CT_L6_IT_L5A_AMPA" presynapticPopulation="CT_L6" postsynapticPopulation="IT_L5A" synapse="AMPA">
            <connectionWD id="0" preCellId="../CT_L6/6/CELL_CT" postCellId="../IT_L5A/2/CELL_IT" weight="0.004" delay="8.137679837450516 ms"/>
            <connectionWD id="1" preCellId="../CT_L6/2/CELL_CT" postCellId="../IT_L5A/3/CELL_IT" weight="0.002" delay="8.873038140803269 ms"/>
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        </projection>
        <projection id="NetConn_IT_L4_IT_L5B_AMPA" presynapticPopulation="IT_L4" postsynapticPopulation="IT_L5B" synapse="AMPA">
            <connectionWD id="0" preCellId="../IT_L4/13/CELL_IT" postCellId="../IT_L5B/0/CELL_IT" weight="0.044" delay="4.283317460728719 ms"/>
            <connectionWD id="1" preCellId="../IT_L4/0/CELL_IT" postCellId="../IT_L5B/3/CELL_IT" weight="0.044" delay="5.100971017537067 ms"/>
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        </projection>
        <projection id="NetConn_PT_L5B_IT_L5B_AMPA" presynapticPopulation="PT_L5B" postsynapticPopulation="IT_L5B" synapse="AMPA">
            <connectionWD id="0" preCellId="../PT_L5B/17/CELL_PT" postCellId="../IT_L5B/0/CELL_IT" weight="0.0355" delay="2.2795768555066664 ms"/>
            <connectionWD id="1" preCellId="../PT_L5B/0/CELL_PT" postCellId="../IT_L5B/2/CELL_IT" weight="0.0355" delay="2.8707462754316464 ms"/>
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        </projection>
        <projection id="NetConn_IT_L6_IT_L5B_AMPA" presynapticPopulation="IT_L6" postsynapticPopulation="IT_L5B" synapse="AMPA">
            <connectionWD id="0" preCellId="../IT_L6/4/CELL_IT" postCellId="../IT_L5B/0/CELL_IT" weight="0.02525" delay="5.260888781841798 ms"/>
            <connectionWD id="1" preCellId="../IT_L6/10/CELL_IT" postCellId="../IT_L5B/0/CELL_IT" weight="0.015" delay="6.2599473027359736 ms"/>
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        </projection>
        <projection id="NetConn_SOM_L5_IT_L5B_GABAB" presynapticPopulation="SOM_L5" postsynapticPopulation="IT_L5B" synapse="GABAB">
            <connectionWD id="0" preCellId="../SOM_L5/1/CELL_SOM" postCellId="../IT_L5B/0/CELL_IT" weight="0.025" delay="3.368973438723587 ms"/>
            <connectionWD id="1" preCellId="../SOM_L5/4/CELL_SOM" postCellId="../IT_L5B/0/CELL_IT" weight="0.025" delay="2.6057295189469905 ms"/>
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        </projection>
        <projection id="NetConn_PV_L5_IT_L5B_GABAA" presynapticPopulation="PV_L5" postsynapticPopulation="IT_L5B" synapse="GABAA">
            <connectionWD id="0" preCellId="../PV_L5/2/CELL_PV" postCellId="../IT_L5B/0/CELL_IT" weight="0.025" delay="3.990566440180148 ms"/>
            <connectionWD id="1" preCellId="../PV_L5/10/CELL_PV" postCellId="../IT_L5B/0/CELL_IT" weight="0.025" delay="2.5384503880653373 ms"/>
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        </projection>
        <projection id="NetConn_IT_L23_IT_L5B_AMPA" presynapticPopulation="IT_L23" postsynapticPopulation="IT_L5B" synapse="AMPA">
            <connectionWD id="0" preCellId="../IT_L23/43/CELL_IT" postCellId="../IT_L5B/1/CELL_IT" weight="0.0505" delay="7.2846093782443395 ms"/>
            <connectionWD id="1" preCellId="../IT_L23/6/CELL_IT" postCellId="../IT_L5B/3/CELL_IT" weight="0.0275" delay="7.273883563371909 ms"/>
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        </projection>
        <projection id="NetConn_IT_L5A_IT_L5B_AMPA" presynapticPopulation="IT_L5A" postsynapticPopulation="IT_L5B" synapse="AMPA">
            <connectionWD id="0" preCellId="../IT_L5A/13/CELL_IT" postCellId="../IT_L5B/2/CELL_IT" weight="0.044" delay="3.5612148962586545 ms"/>
            <connectionWD id="1" preCellId="../IT_L5A/8/CELL_IT" postCellId="../IT_L5B/2/CELL_IT" weight="0.0355" delay="2.705445540429343 ms"/>
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        </projection>
        <projection id="NetConn_IT_L5B_IT_L5B_AMPA" presynapticPopulation="IT_L5B" postsynapticPopulation="IT_L5B" synapse="AMPA">
            <connectionWD id="0" preCellId="../IT_L5B/13/CELL_IT" postCellId="../IT_L5B/2/CELL_IT" weight="0.0355" delay="2.677023957949285 ms"/>
            <connectionWD id="1" preCellId="../IT_L5B/24/CELL_IT" postCellId="../IT_L5B/2/CELL_IT" weight="0.0355" delay="2.5069045221758306 ms"/>
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        </projection>
        <projection id="NetConn_CT_L6_IT_L5B_AMPA" presynapticPopulation="CT_L6" postsynapticPopulation="IT_L5B" synapse="AMPA">
            <connectionWD id="0" preCellId="../CT_L6/12/CELL_CT" postCellId="../IT_L5B/4/CELL_IT" weight="0.02525" delay="2.75853294211999 ms"/>
            <connectionWD id="1" preCellId="../CT_L6/21/CELL_CT" postCellId="../IT_L5B/5/CELL_IT" weight="0.015" delay="5.83973987270353 ms"/>
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        </projection>
        <projection id="NetConn_IT_L23_PT_L5B_AMPA" presynapticPopulation="IT_L23" postsynapticPopulation="PT_L5B" synapse="AMPA">
            <connectionWD id="0" preCellId="../IT_L23/34/CELL_IT" postCellId="../PT_L5B/0/CELL_PT" weight="0.0505" delay="6.385857810237009 ms"/>
            <connectionWD id="1" preCellId="../IT_L23/33/CELL_IT" postCellId="../PT_L5B/1/CELL_PT" weight="0.011" delay="8.31557995443614 ms"/>
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        </projection>
        <projection id="NetConn_IT_L5B_PT_L5B_AMPA" presynapticPopulation="IT_L5B" postsynapticPopulation="PT_L5B" synapse="AMPA">
            <connectionWD id="0" preCellId="../IT_L5B/31/CELL_IT" postCellId="../PT_L5B/0/CELL_PT" weight="0.0355" delay="3.4653214914073036 ms"/>
            <connectionWD id="1" preCellId="../IT_L5B/19/CELL_IT" postCellId="../PT_L5B/0/CELL_PT" weight="0.0355" delay="2.4775205849439734 ms"/>
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        </projection>
        <projection id="NetConn_PT_L5B_PT_L5B_AMPA" presynapticPopulation="PT_L5B" postsynapticPopulation="PT_L5B" synapse="AMPA">
            <connectionWD id="0" preCellId="../PT_L5B/25/CELL_PT" postCellId="../PT_L5B/0/CELL_PT" weight="0.0355" delay="2.6736461518511785 ms"/>
            <connectionWD id="1" preCellId="../PT_L5B/19/CELL_PT" postCellId="../PT_L5B/1/CELL_PT" weight="0.0355" delay="2.4710832812981183 ms"/>
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        </projection>
        <projection id="NetConn_IT_L6_PT_L5B_AMPA" presynapticPopulation="IT_L6" postsynapticPopulation="PT_L5B" synapse="AMPA">
            <connectionWD id="0" preCellId="../IT_L6/10/CELL_IT" postCellId="../PT_L5B/0/CELL_PT" weight="0.015" delay="5.109551696380327 ms"/>
            <connectionWD id="1" preCellId="../IT_L6/20/CELL_IT" postCellId="../PT_L5B/3/CELL_PT" weight="0.02525" delay="4.893691557272957 ms"/>
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        </projection>
        <projection id="NetConn_SOM_L5_PT_L5B_GABAB" presynapticPopulation="SOM_L5" postsynapticPopulation="PT_L5B" synapse="GABAB">
            <connectionWD id="0" preCellId="../SOM_L5/1/CELL_SOM" postCellId="../PT_L5B/0/CELL_PT" weight="0.025" delay="2.411247088382703 ms"/>
            <connectionWD id="1" preCellId="../SOM_L5/4/CELL_SOM" postCellId="../PT_L5B/0/CELL_PT" weight="0.025" delay="2.752271845183868 ms"/>
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        </projection>
        <projection id="NetConn_PV_L5_PT_L5B_GABAA" presynapticPopulation="PV_L5" postsynapticPopulation="PT_L5B" synapse="GABAA">
            <connectionWD id="0" preCellId="../PV_L5/9/CELL_PV" postCellId="../PT_L5B/0/CELL_PT" weight="0.025" delay="3.019403768992693 ms"/>
            <connectionWD id="1" preCellId="../PV_L5/1/CELL_PV" postCellId="../PT_L5B/1/CELL_PT" weight="0.025" delay="3.9546879157784787 ms"/>
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        </projection>
        <projection id="NetConn_IT_L5A_PT_L5B_AMPA" presynapticPopulation="IT_L5A" postsynapticPopulation="PT_L5B" synapse="AMPA">
            <connectionWD id="0" preCellId="../IT_L5A/14/CELL_IT" postCellId="../PT_L5B/1/CELL_PT" weight="0.0355" delay="3.2394807257709397 ms"/>
            <connectionWD id="1" preCellId="../IT_L5A/24/CELL_IT" postCellId="../PT_L5B/1/CELL_PT" weight="0.0355" delay="3.0003055490797683 ms"/>
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        </projection>
        <projection id="NetConn_IT_L4_PT_L5B_AMPA" presynapticPopulation="IT_L4" postsynapticPopulation="PT_L5B" synapse="AMPA">
            <connectionWD id="0" preCellId="../IT_L4/18/CELL_IT" postCellId="../PT_L5B/2/CELL_PT" weight="0.044" delay="5.017629914264507 ms"/>
            <connectionWD id="1" preCellId="../IT_L4/9/CELL_IT" postCellId="../PT_L5B/2/CELL_PT" weight="0.044" delay="4.260739546065014 ms"/>
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        </projection>
        <projection id="NetConn_CT_L6_PT_L5B_AMPA" presynapticPopulation="CT_L6" postsynapticPopulation="PT_L5B" synapse="AMPA">
            <connectionWD id="0" preCellId="../CT_L6/12/CELL_CT" postCellId="../PT_L5B/2/CELL_PT" weight="0.02525" delay="4.787330014329107 ms"/>
            <connectionWD id="1" preCellId="../CT_L6/27/CELL_CT" postCellId="../PT_L5B/4/CELL_PT" weight="0.015" delay="4.833248728339415 ms"/>
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        </projection>
        <projection id="NetConn_IT_L6_IT_L6_AMPA" presynapticPopulation="IT_L6" postsynapticPopulation="IT_L6" synapse="AMPA">
            <connectionWD id="0" preCellId="../IT_L6/13/CELL_IT" postCellId="../IT_L6/0/CELL_IT" weight="0.0265" delay="2.2047490782693853 ms"/>
            <connectionWD id="1" preCellId="../IT_L6/30/CELL_IT" postCellId="../IT_L6/2/CELL_IT" weight="0.0245" delay="3.213210422770072 ms"/>
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        </projection>
        <projection id="NetConn_SOM_L6_IT_L6_GABAB" presynapticPopulation="SOM_L6" postsynapticPopulation="IT_L6" synapse="GABAB">
            <connectionWD id="0" preCellId="../SOM_L6/2/CELL_SOM" postCellId="../IT_L6/0/CELL_IT" weight="0.025" delay="2.3801932307644855 ms"/>
            <connectionWD id="1" preCellId="../SOM_L6/6/CELL_SOM" postCellId="../IT_L6/0/CELL_IT" weight="0.025" delay="2.9732334517714083 ms"/>
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        </projection>
        <projection id="NetConn_PV_L6_IT_L6_GABAA" presynapticPopulation="PV_L6" postsynapticPopulation="IT_L6" synapse="GABAA">
            <connectionWD id="0" preCellId="../PV_L6/2/CELL_PV" postCellId="../IT_L6/0/CELL_IT" weight="0.025" delay="2.4085519564599234 ms"/>
            <connectionWD id="1" preCellId="../PV_L6/3/CELL_PV" postCellId="../IT_L6/0/CELL_IT" weight="0.025" delay="2.043076466388705 ms"/>
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        </projection>
        <projection id="NetConn_CT_L6_IT_L6_AMPA" presynapticPopulation="CT_L6" postsynapticPopulation="IT_L6" synapse="AMPA">
            <connectionWD id="0" preCellId="../CT_L6/12/CELL_CT" postCellId="../IT_L6/1/CELL_IT" weight="0.025375" delay="2.0946336144976785 ms"/>
            <connectionWD id="1" preCellId="../CT_L6/22/CELL_CT" postCellId="../IT_L6/6/CELL_IT" weight="0.0265" delay="2.974141563833925 ms"/>
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        </projection>
        <projection id="NetConn_IT_L5A_IT_L6_AMPA" presynapticPopulation="IT_L5A" postsynapticPopulation="IT_L6" synapse="AMPA">
            <connectionWD id="0" preCellId="../IT_L5A/0/CELL_IT" postCellId="../IT_L6/2/CELL_IT" weight="0.014" delay="7.287612550355586 ms"/>
            <connectionWD id="1" preCellId="../IT_L5A/18/CELL_IT" postCellId="../IT_L6/11/CELL_IT" weight="0.014" delay="7.220281989100287 ms"/>
            <connectionWD id="2" preCellId="../IT_L5A/19/CELL_IT" postCellId="../IT_L6/19/CELL_IT" weight="0.014" delay="9.570059429268023 ms"/>
            <connectionWD id="3" preCellId="../IT_L5A/12/CELL_IT" postCellId="../IT_L6/28/CELL_IT" weight="0.014" delay="7.561260920685297 ms"/>
        </projection>
        <projection id="NetConn_IT_L5B_IT_L6_AMPA" presynapticPopulation="IT_L5B" postsynapticPopulation="IT_L6" synapse="AMPA">
            <connectionWD id="0" preCellId="../IT_L5B/6/CELL_IT" postCellId="../IT_L6/2/CELL_IT" weight="0.0245" delay="3.8449757727676777 ms"/>
            <connectionWD id="1" preCellId="../IT_L5B/8/CELL_IT" postCellId="../IT_L6/2/CELL_IT" weight="0.0245" delay="3.7544704424339717 ms"/>
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        </projection>
        <projection id="NetConn_IT_L5A_CT_L6_AMPA" presynapticPopulation="IT_L5A" postsynapticPopulation="CT_L6" synapse="AMPA">
            <connectionWD id="0" preCellId="../IT_L5A/12/CELL_IT" postCellId="../CT_L6/0/CELL_CT" weight="0.014" delay="8.58506677566308 ms"/>
            <connectionWD id="1" preCellId="../IT_L5A/8/CELL_IT" postCellId="../CT_L6/16/CELL_CT" weight="0.0245" delay="8.071920772058004 ms"/>
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        </projection>
        <projection id="NetConn_SOM_L6_CT_L6_GABAB" presynapticPopulation="SOM_L6" postsynapticPopulation="CT_L6" synapse="GABAB">
            <connectionWD id="0" preCellId="../SOM_L6/1/CELL_SOM" postCellId="../CT_L6/0/CELL_CT" weight="0.025" delay="2.5491693889278775 ms"/>
            <connectionWD id="1" preCellId="../SOM_L6/4/CELL_SOM" postCellId="../CT_L6/0/CELL_CT" weight="0.025" delay="3.251585289501843 ms"/>
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        </projection>
        <projection id="NetConn_PV_L6_CT_L6_GABAA" presynapticPopulation="PV_L6" postsynapticPopulation="CT_L6" synapse="GABAA">
            <connectionWD id="0" preCellId="../PV_L6/0/CELL_PV" postCellId="../CT_L6/0/CELL_CT" weight="0.025" delay="3.4986183953541916 ms"/>
            <connectionWD id="1" preCellId="../PV_L6/2/CELL_PV" postCellId="../CT_L6/0/CELL_CT" weight="0.025" delay="2.261784302288145 ms"/>
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        </projection>
        <projection id="NetConn_IT_L5B_CT_L6_AMPA" presynapticPopulation="IT_L5B" postsynapticPopulation="CT_L6" synapse="AMPA">
            <connectionWD id="0" preCellId="../IT_L5B/14/CELL_IT" postCellId="../CT_L6/1/CELL_CT" weight="0.0245" delay="6.4540337823160705 ms"/>
            <connectionWD id="1" preCellId="../IT_L5B/6/CELL_IT" postCellId="../CT_L6/18/CELL_CT" weight="0.0245" delay="4.51967035171641 ms"/>
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        </projection>
        <projection id="NetConn_IT_L6_CT_L6_AMPA" presynapticPopulation="IT_L6" postsynapticPopulation="CT_L6" synapse="AMPA">
            <connectionWD id="0" preCellId="../IT_L6/6/CELL_IT" postCellId="../CT_L6/1/CELL_CT" weight="0.0265" delay="3.16128435730183 ms"/>
            <connectionWD id="1" preCellId="../IT_L6/18/CELL_IT" postCellId="../CT_L6/6/CELL_CT" weight="0.0265" delay="2.322424156732651 ms"/>
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        </projection>
        <projection id="NetConn_CT_L6_CT_L6_AMPA" presynapticPopulation="CT_L6" postsynapticPopulation="CT_L6" synapse="AMPA">
            <connectionWD id="0" preCellId="../CT_L6/7/CELL_CT" postCellId="../CT_L6/2/CELL_CT" weight="0.0265" delay="3.284167216640713 ms"/>
            <connectionWD id="1" preCellId="../CT_L6/5/CELL_CT" postCellId="../CT_L6/2/CELL_CT" weight="0.0265" delay="2.8184059354894835 ms"/>
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        </projection>
        <projection id="NetConn_IT_L23_PV_L23_AMPA" presynapticPopulation="IT_L23" postsynapticPopulation="PV_L23" synapse="AMPA">
            <connectionWD id="0" preCellId="../IT_L23/2/CELL_IT" postCellId="../PV_L23/0/CELL_PV" weight="0.039" delay="4.304740453668181 ms"/>
            <connectionWD id="1" preCellId="../IT_L23/3/CELL_IT" postCellId="../PV_L23/0/CELL_PV" weight="0.039" delay="4.583496396938678 ms"/>
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        </projection>
        <projection id="NetConn_IT_L4_PV_L23_AMPA" presynapticPopulation="IT_L4" postsynapticPopulation="PV_L23" synapse="AMPA">
            <connectionWD id="0" preCellId="../IT_L4/1/CELL_IT" postCellId="../PV_L23/0/CELL_PV" weight="0.018125" delay="5.6785955445390055 ms"/>
            <connectionWD id="1" preCellId="../IT_L4/6/CELL_IT" postCellId="../PV_L23/4/CELL_PV" weight="0.018125" delay="3.6088239676141267 ms"/>
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        </projection>
        <projection id="NetConn_IT_L5A_PV_L23_AMPA" presynapticPopulation="IT_L5A" postsynapticPopulation="PV_L23" synapse="AMPA">
            <connectionWD id="0" preCellId="../IT_L5A/10/CELL_IT" postCellId="../PV_L23/0/CELL_PV" weight="0.018125" delay="6.153236017417674 ms"/>
            <connectionWD id="1" preCellId="../IT_L5A/18/CELL_IT" postCellId="../PV_L23/1/CELL_PV" weight="0.018125" delay="5.394889438660551 ms"/>
            <connectionWD id="2" preCellId="../IT_L5A/23/CELL_IT" postCellId="../PV_L23/1/CELL_PV" weight="0.018125" delay="4.9037806096094085 ms"/>
            <connectionWD id="3" preCellId="../IT_L5A/12/CELL_IT" postCellId="../PV_L23/6/CELL_PV" weight="0.018125" delay="5.780815032310551 ms"/>
        </projection>
        <projection id="NetConn_IT_L5B_PV_L23_AMPA" presynapticPopulation="IT_L5B" postsynapticPopulation="PV_L23" synapse="AMPA">
            <connectionWD id="0" preCellId="../IT_L5B/2/CELL_IT" postCellId="../PV_L23/0/CELL_PV" weight="0.018125" delay="8.189602158072745 ms"/>
            <connectionWD id="1" preCellId="../IT_L5B/13/CELL_IT" postCellId="../PV_L23/1/CELL_PV" weight="0.018125" delay="7.444304355593548 ms"/>
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        </projection>
        <projection id="NetConn_PT_L5B_PV_L23_AMPA" presynapticPopulation="PT_L5B" postsynapticPopulation="PV_L23" synapse="AMPA">
            <connectionWD id="0" preCellId="../PT_L5B/8/CELL_PT" postCellId="../PV_L23/0/CELL_PV" weight="0.018125" delay="9.173994509902894 ms"/>
            <connectionWD id="1" preCellId="../PT_L5B/23/CELL_PT" postCellId="../PV_L23/0/CELL_PV" weight="0.018125" delay="10.3688762071559 ms"/>
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        </projection>
        <projection id="NetConn_SOM_L23_PV_L23_GABAB" presynapticPopulation="SOM_L23" postsynapticPopulation="PV_L23" synapse="GABAB">
            <connectionWD id="0" preCellId="../SOM_L23/1/CELL_SOM" postCellId="../PV_L23/1/CELL_PV" weight="0.025" delay="2.770265684264046 ms"/>
            <connectionWD id="1" preCellId="../SOM_L23/2/CELL_SOM" postCellId="../PV_L23/1/CELL_PV" weight="0.025" delay="2.4497641290062875 ms"/>
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        </projection>
        <projection id="NetConn_PV_L23_PV_L23_GABAA" presynapticPopulation="PV_L23" postsynapticPopulation="PV_L23" synapse="GABAA">
            <connectionWD id="0" preCellId="../PV_L23/2/CELL_PV" postCellId="../PV_L23/1/CELL_PV" weight="0.025" delay="3.092310059064998 ms"/>
            <connectionWD id="1" preCellId="../PV_L23/3/CELL_PV" postCellId="../PV_L23/1/CELL_PV" weight="0.025" delay="2.6683881364746544 ms"/>
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        </projection>
        <projection id="NetConn_IT_L23_SOM_L23_AMPA" presynapticPopulation="IT_L23" postsynapticPopulation="SOM_L23" synapse="AMPA">
            <connectionWD id="0" preCellId="../IT_L23/13/CELL_IT" postCellId="../SOM_L23/0/CELL_SOM" weight="0.039" delay="2.360658450388456 ms"/>
            <connectionWD id="1" preCellId="../IT_L23/21/CELL_IT" postCellId="../SOM_L23/0/CELL_SOM" weight="0.039" delay="3.814576803992324 ms"/>
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        </projection>
        <projection id="NetConn_IT_L5B_SOM_L23_AMPA" presynapticPopulation="IT_L5B" postsynapticPopulation="SOM_L23" synapse="AMPA">
            <connectionWD id="0" preCellId="../IT_L5B/15/CELL_IT" postCellId="../SOM_L23/0/CELL_SOM" weight="0.018125" delay="8.496640713796673 ms"/>
            <connectionWD id="1" preCellId="../IT_L5B/12/CELL_IT" postCellId="../SOM_L23/1/CELL_SOM" weight="0.018125" delay="9.901829587716225 ms"/>
            <connectionWD id="2" preCellId="../IT_L5B/32/CELL_IT" postCellId="../SOM_L23/4/CELL_SOM" weight="0.018125" delay="7.248660721764091 ms"/>
            <connectionWD id="3" preCellId="../IT_L5B/14/CELL_IT" postCellId="../SOM_L23/6/CELL_SOM" weight="0.018125" delay="9.518475771575197 ms"/>
        </projection>
        <projection id="NetConn_SOM_L23_SOM_L23_GABAB" presynapticPopulation="SOM_L23" postsynapticPopulation="SOM_L23" synapse="GABAB">
            <connectionWD id="0" preCellId="../SOM_L23/2/CELL_SOM" postCellId="../SOM_L23/0/CELL_SOM" weight="0.025" delay="3.2928728177207964 ms"/>
            <connectionWD id="1" preCellId="../SOM_L23/4/CELL_SOM" postCellId="../SOM_L23/0/CELL_SOM" weight="0.025" delay="2.3725202422013276 ms"/>
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        </projection>
        <projection id="NetConn_PV_L23_SOM_L23_GABAA" presynapticPopulation="PV_L23" postsynapticPopulation="SOM_L23" synapse="GABAA">
            <connectionWD id="0" preCellId="../PV_L23/1/CELL_PV" postCellId="../SOM_L23/0/CELL_SOM" weight="0.025" delay="2.871889231110508 ms"/>
            <connectionWD id="1" preCellId="../PV_L23/3/CELL_PV" postCellId="../SOM_L23/0/CELL_SOM" weight="0.025" delay="2.2487879509896502 ms"/>
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        </projection>
        <projection id="NetConn_IT_L4_SOM_L23_AMPA" presynapticPopulation="IT_L4" postsynapticPopulation="SOM_L23" synapse="AMPA">
            <connectionWD id="0" preCellId="../IT_L4/23/CELL_IT" postCellId="../SOM_L23/1/CELL_SOM" weight="0.018125" delay="4.306463210481894 ms"/>
            <connectionWD id="1" preCellId="../IT_L4/13/CELL_IT" postCellId="../SOM_L23/3/CELL_SOM" weight="0.018125" delay="5.278721851551932 ms"/>
            <connectionWD id="2" preCellId="../IT_L4/21/CELL_IT" postCellId="../SOM_L23/5/CELL_SOM" weight="0.018125" delay="5.419322237475289 ms"/>
        </projection>
        <projection id="NetConn_PT_L5B_SOM_L23_AMPA" presynapticPopulation="PT_L5B" postsynapticPopulation="SOM_L23" synapse="AMPA">
            <connectionWD id="0" preCellId="../PT_L5B/17/CELL_PT" postCellId="../SOM_L23/2/CELL_SOM" weight="0.018125" delay="7.084024432598721 ms"/>
            <connectionWD id="1" preCellId="../PT_L5B/18/CELL_PT" postCellId="../SOM_L23/3/CELL_SOM" weight="0.018125" delay="9.54864263200918 ms"/>
            <connectionWD id="2" preCellId="../PT_L5B/30/CELL_PT" postCellId="../SOM_L23/4/CELL_SOM" weight="0.018125" delay="8.069163637130648 ms"/>
            <connectionWD id="3" preCellId="../PT_L5B/15/CELL_PT" postCellId="../SOM_L23/5/CELL_SOM" weight="0.018125" delay="7.810088918439118 ms"/>
        </projection>
        <projection id="NetConn_IT_L5A_SOM_L23_AMPA" presynapticPopulation="IT_L5A" postsynapticPopulation="SOM_L23" synapse="AMPA">
            <connectionWD id="0" preCellId="../IT_L5A/3/CELL_IT" postCellId="../SOM_L23/3/CELL_SOM" weight="0.018125" delay="5.841044531421163 ms"/>
            <connectionWD id="1" preCellId="../IT_L5A/14/CELL_IT" postCellId="../SOM_L23/3/CELL_SOM" weight="0.018125" delay="6.910829736931903 ms"/>
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        </projection>
        <projection id="NetConn_IT_L23_PV_L5_AMPA" presynapticPopulation="IT_L23" postsynapticPopulation="PV_L5" synapse="AMPA">
            <connectionWD id="0" preCellId="../IT_L23/22/CELL_IT" postCellId="../PV_L5/0/CELL_PV" weight="0.0055" delay="8.08847544911056 ms"/>
            <connectionWD id="1" preCellId="../IT_L23/25/CELL_IT" postCellId="../PV_L5/0/CELL_PV" weight="0.0055" delay="9.918427347404863 ms"/>
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        </projection>
        <projection id="NetConn_IT_L4_PV_L5_AMPA" presynapticPopulation="IT_L4" postsynapticPopulation="PV_L5" synapse="AMPA">
            <connectionWD id="0" preCellId="../IT_L4/1/CELL_IT" postCellId="../PV_L5/0/CELL_PV" weight="0.053875" delay="6.71796579299288 ms"/>
            <connectionWD id="1" preCellId="../IT_L4/12/CELL_IT" postCellId="../PV_L5/0/CELL_PV" weight="0.053875" delay="6.506157628782596 ms"/>
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        </projection>
        <projection id="NetConn_IT_L5A_PV_L5_AMPA" presynapticPopulation="IT_L5A" postsynapticPopulation="PV_L5" synapse="AMPA">
            <connectionWD id="0" preCellId="../IT_L5A/1/CELL_IT" postCellId="../PV_L5/0/CELL_PV" weight="0.053875" delay="5.396713962964872 ms"/>
            <connectionWD id="1" preCellId="../IT_L5A/3/CELL_IT" postCellId="../PV_L5/0/CELL_PV" weight="0.053875" delay="6.21682474366617 ms"/>
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        </projection>
        <projection id="NetConn_IT_L5B_PV_L5_AMPA" presynapticPopulation="IT_L5B" postsynapticPopulation="PV_L5" synapse="AMPA">
            <connectionWD id="0" preCellId="../IT_L5B/0/CELL_IT" postCellId="../PV_L5/0/CELL_PV" weight="0.053875" delay="4.528916536913637 ms"/>
            <connectionWD id="1" preCellId="../IT_L5B/3/CELL_IT" postCellId="../PV_L5/0/CELL_PV" weight="0.053875" delay="4.592491057181725 ms"/>
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        </projection>
        <projection id="NetConn_PT_L5B_PV_L5_AMPA" presynapticPopulation="PT_L5B" postsynapticPopulation="PV_L5" synapse="AMPA">
            <connectionWD id="0" preCellId="../PT_L5B/3/CELL_PT" postCellId="../PV_L5/0/CELL_PV" weight="0.053875" delay="4.278224136776174 ms"/>
            <connectionWD id="1" preCellId="../PT_L5B/7/CELL_PT" postCellId="../PV_L5/0/CELL_PV" weight="0.053875" delay="3.9147806381577874 ms"/>
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        </projection>
        <projection id="NetConn_SOM_L5_PV_L5_GABAB" presynapticPopulation="SOM_L5" postsynapticPopulation="PV_L5" synapse="GABAB">
            <connectionWD id="0" preCellId="../SOM_L5/0/CELL_SOM" postCellId="../PV_L5/0/CELL_PV" weight="0.025" delay="2.6436461897059127 ms"/>
            <connectionWD id="1" preCellId="../SOM_L5/4/CELL_SOM" postCellId="../PV_L5/0/CELL_PV" weight="0.025" delay="3.9424180294734708 ms"/>
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        </projection>
        <projection id="NetConn_PV_L5_PV_L5_GABAA" presynapticPopulation="PV_L5" postsynapticPopulation="PV_L5" synapse="GABAA">
            <connectionWD id="0" preCellId="../PV_L5/2/CELL_PV" postCellId="../PV_L5/0/CELL_PV" weight="0.025" delay="2.649693330330823 ms"/>
            <connectionWD id="1" preCellId="../PV_L5/7/CELL_PV" postCellId="../PV_L5/0/CELL_PV" weight="0.025" delay="2.3871257642518615 ms"/>
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        </projection>
        <projection id="NetConn_CT_L6_PV_L5_AMPA" presynapticPopulation="CT_L6" postsynapticPopulation="PV_L5" synapse="AMPA">
            <connectionWD id="0" preCellId="../CT_L6/8/CELL_CT" postCellId="../PV_L5/2/CELL_PV" weight="0.012393" delay="3.367735333041203 ms"/>
            <connectionWD id="1" preCellId="../CT_L6/1/CELL_CT" postCellId="../PV_L5/8/CELL_PV" weight="0.012393" delay="9.772509046077278 ms"/>
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        </projection>
        <projection id="NetConn_IT_L6_PV_L5_AMPA" presynapticPopulation="IT_L6" postsynapticPopulation="PV_L5" synapse="AMPA">
            <connectionWD id="0" preCellId="../IT_L6/12/CELL_IT" postCellId="../PV_L5/3/CELL_PV" weight="0.012393" delay="5.012033327846996 ms"/>
            <connectionWD id="1" preCellId="../IT_L6/17/CELL_IT" postCellId="../PV_L5/3/CELL_PV" weight="0.012393" delay="4.629518747807664 ms"/>
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        </projection>
        <projection id="NetConn_IT_L23_SOM_L5_AMPA" presynapticPopulation="IT_L23" postsynapticPopulation="SOM_L5" synapse="AMPA">
            <connectionWD id="0" preCellId="../IT_L23/3/CELL_IT" postCellId="../SOM_L5/0/CELL_SOM" weight="0.0505" delay="8.327630825116792 ms"/>
            <connectionWD id="1" preCellId="../IT_L23/4/CELL_IT" postCellId="../SOM_L5/0/CELL_SOM" weight="0.0505" delay="8.457234516757733 ms"/>
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        </projection>
        <projection id="NetConn_IT_L4_SOM_L5_AMPA" presynapticPopulation="IT_L4" postsynapticPopulation="SOM_L5" synapse="AMPA">
            <connectionWD id="0" preCellId="../IT_L4/3/CELL_IT" postCellId="../SOM_L5/0/CELL_SOM" weight="0.006125" delay="7.365993669180645 ms"/>
            <connectionWD id="1" preCellId="../IT_L4/22/CELL_IT" postCellId="../SOM_L5/1/CELL_SOM" weight="0.006125" delay="6.555907887956019 ms"/>
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        </projection>
        <projection id="NetConn_IT_L5B_SOM_L5_AMPA" presynapticPopulation="IT_L5B" postsynapticPopulation="SOM_L5" synapse="AMPA">
            <connectionWD id="0" preCellId="../IT_L5B/1/CELL_IT" postCellId="../SOM_L5/0/CELL_SOM" weight="0.006125" delay="3.8325748480570754 ms"/>
            <connectionWD id="1" preCellId="../IT_L5B/17/CELL_IT" postCellId="../SOM_L5/0/CELL_SOM" weight="0.006125" delay="5.218294872689388 ms"/>
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        </projection>
        <projection id="NetConn_IT_L6_SOM_L5_AMPA" presynapticPopulation="IT_L6" postsynapticPopulation="SOM_L5" synapse="AMPA">
            <connectionWD id="0" preCellId="../IT_L6/2/CELL_IT" postCellId="../SOM_L5/0/CELL_SOM" weight="0.012393" delay="3.553005670881542 ms"/>
            <connectionWD id="1" preCellId="../IT_L6/3/CELL_IT" postCellId="../SOM_L5/0/CELL_SOM" weight="0.012393" delay="3.968232967408274 ms"/>
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        </projection>
        <projection id="NetConn_CT_L6_SOM_L5_AMPA" presynapticPopulation="CT_L6" postsynapticPopulation="SOM_L5" synapse="AMPA">
            <connectionWD id="0" preCellId="../CT_L6/20/CELL_CT" postCellId="../SOM_L5/0/CELL_SOM" weight="0.012393" delay="4.905375839735138 ms"/>
            <connectionWD id="1" preCellId="../CT_L6/22/CELL_CT" postCellId="../SOM_L5/1/CELL_SOM" weight="0.012393" delay="6.490382043787562 ms"/>
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        </projection>
        <projection id="NetConn_SOM_L5_SOM_L5_GABAB" presynapticPopulation="SOM_L5" postsynapticPopulation="SOM_L5" synapse="GABAB">
            <connectionWD id="0" preCellId="../SOM_L5/2/CELL_SOM" postCellId="../SOM_L5/0/CELL_SOM" weight="0.025" delay="2.578667195799072 ms"/>
            <connectionWD id="1" preCellId="../SOM_L5/6/CELL_SOM" postCellId="../SOM_L5/0/CELL_SOM" weight="0.025" delay="2.9190821095379276 ms"/>
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        </projection>
        <projection id="NetConn_PV_L5_SOM_L5_GABAA" presynapticPopulation="PV_L5" postsynapticPopulation="SOM_L5" synapse="GABAA">
            <connectionWD id="0" preCellId="../PV_L5/0/CELL_PV" postCellId="../SOM_L5/0/CELL_SOM" weight="0.025" delay="2.6436461897059127 ms"/>
            <connectionWD id="1" preCellId="../PV_L5/3/CELL_PV" postCellId="../SOM_L5/0/CELL_SOM" weight="0.025" delay="2.1540394570604233 ms"/>
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        </projection>
        <projection id="NetConn_PT_L5B_SOM_L5_AMPA" presynapticPopulation="PT_L5B" postsynapticPopulation="SOM_L5" synapse="AMPA">
            <connectionWD id="0" preCellId="../PT_L5B/17/CELL_PT" postCellId="../SOM_L5/1/CELL_SOM" weight="0.006125" delay="3.481235273830199 ms"/>
            <connectionWD id="1" preCellId="../PT_L5B/18/CELL_PT" postCellId="../SOM_L5/1/CELL_SOM" weight="0.006125" delay="2.7179931748209345 ms"/>
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        </projection>
        <projection id="NetConn_IT_L5A_SOM_L5_AMPA" presynapticPopulation="IT_L5A" postsynapticPopulation="SOM_L5" synapse="AMPA">
            <connectionWD id="0" preCellId="../IT_L5A/19/CELL_IT" postCellId="../SOM_L5/3/CELL_SOM" weight="0.006125" delay="3.150009970501098 ms"/>
            <connectionWD id="1" preCellId="../IT_L5A/21/CELL_IT" postCellId="../SOM_L5/4/CELL_SOM" weight="0.006125" delay="3.0751348193724013 ms"/>
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        </projection>
        <projection id="NetConn_IT_L4_PV_L6_AMPA" presynapticPopulation="IT_L4" postsynapticPopulation="PV_L6" synapse="AMPA">
            <connectionWD id="0" preCellId="../IT_L4/8/CELL_IT" postCellId="../PV_L6/0/CELL_PV" weight="0.021875" delay="8.10585799292868 ms"/>
            <connectionWD id="1" preCellId="../IT_L4/12/CELL_IT" postCellId="../PV_L6/3/CELL_PV" weight="0.021875" delay="9.802114324699955 ms"/>
            <connectionWD id="2" preCellId="../IT_L4/13/CELL_IT" postCellId="../PV_L6/3/CELL_PV" weight="0.021875" delay="10.062857216691157 ms"/>
            <connectionWD id="3" preCellId="../IT_L4/18/CELL_IT" postCellId="../PV_L6/5/CELL_PV" weight="0.021875" delay="10.746528931148015 ms"/>
        </projection>
        <projection id="NetConn_CT_L6_PV_L6_AMPA" presynapticPopulation="CT_L6" postsynapticPopulation="PV_L6" synapse="AMPA">
            <connectionWD id="0" preCellId="../CT_L6/5/CELL_CT" postCellId="../PV_L6/0/CELL_PV" weight="0.0265" delay="3.85018276849463 ms"/>
            <connectionWD id="1" preCellId="../CT_L6/23/CELL_CT" postCellId="../PV_L6/2/CELL_PV" weight="0.0265" delay="2.2551282743306875 ms"/>
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        </projection>
        <projection id="NetConn_SOM_L6_PV_L6_GABAB" presynapticPopulation="SOM_L6" postsynapticPopulation="PV_L6" synapse="GABAB">
            <connectionWD id="0" preCellId="../SOM_L6/0/CELL_SOM" postCellId="../PV_L6/0/CELL_PV" weight="0.025" delay="3.009236770239794 ms"/>
            <connectionWD id="1" preCellId="../SOM_L6/1/CELL_SOM" postCellId="../PV_L6/0/CELL_PV" weight="0.025" delay="3.0479977203431767 ms"/>
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        </projection>
        <projection id="NetConn_PV_L6_PV_L6_GABAA" presynapticPopulation="PV_L6" postsynapticPopulation="PV_L6" synapse="GABAA">
            <connectionWD id="0" preCellId="../PV_L6/4/CELL_PV" postCellId="../PV_L6/0/CELL_PV" weight="0.025" delay="2.7884210032822425 ms"/>
            <connectionWD id="1" preCellId="../PV_L6/0/CELL_PV" postCellId="../PV_L6/1/CELL_PV" weight="0.025" delay="2.742077195049659 ms"/>
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        </projection>
        <projection id="NetConn_IT_L5A_PV_L6_AMPA" presynapticPopulation="IT_L5A" postsynapticPopulation="PV_L6" synapse="AMPA">
            <connectionWD id="0" preCellId="../IT_L5A/6/CELL_IT" postCellId="../PV_L6/1/CELL_PV" weight="0.021875" delay="6.491821400077619 ms"/>
            <connectionWD id="1" preCellId="../IT_L5A/16/CELL_IT" postCellId="../PV_L6/3/CELL_PV" weight="0.021875" delay="9.232747937545696 ms"/>
        </projection>
        <projection id="NetConn_IT_L5B_PV_L6_AMPA" presynapticPopulation="IT_L5B" postsynapticPopulation="PV_L6" synapse="AMPA">
            <connectionWD id="0" preCellId="../IT_L5B/28/CELL_IT" postCellId="../PV_L6/2/CELL_PV" weight="0.021875" delay="5.9324977233753735 ms"/>
            <connectionWD id="1" preCellId="../IT_L5B/6/CELL_IT" postCellId="../PV_L6/3/CELL_PV" weight="0.021875" delay="5.068648893538887 ms"/>
            <connectionWD id="2" preCellId="../IT_L5B/14/CELL_IT" postCellId="../PV_L6/5/CELL_PV" weight="0.021875" delay="6.419887070898199 ms"/>
            <connectionWD id="3" preCellId="../IT_L5B/12/CELL_IT" postCellId="../PV_L6/6/CELL_PV" weight="0.021875" delay="5.020410879902416 ms"/>
        </projection>
        <projection id="NetConn_PT_L5B_PV_L6_AMPA" presynapticPopulation="PT_L5B" postsynapticPopulation="PV_L6" synapse="AMPA">
            <connectionWD id="0" preCellId="../PT_L5B/25/CELL_PT" postCellId="../PV_L6/2/CELL_PV" weight="0.021875" delay="7.19673299768861 ms"/>
            <connectionWD id="1" preCellId="../PT_L5B/29/CELL_PT" postCellId="../PV_L6/3/CELL_PV" weight="0.021875" delay="7.251684827044495 ms"/>
            <connectionWD id="2" preCellId="../PT_L5B/22/CELL_PT" postCellId="../PV_L6/4/CELL_PV" weight="0.021875" delay="4.07240584174756 ms"/>
        </projection>
        <projection id="NetConn_IT_L6_PV_L6_AMPA" presynapticPopulation="IT_L6" postsynapticPopulation="PV_L6" synapse="AMPA">
            <connectionWD id="0" preCellId="../IT_L6/5/CELL_IT" postCellId="../PV_L6/2/CELL_PV" weight="0.0265" delay="2.3329580486660957 ms"/>
            <connectionWD id="1" preCellId="../IT_L6/11/CELL_IT" postCellId="../PV_L6/2/CELL_PV" weight="0.0265" delay="4.011357581098255 ms"/>
            <connectionWD id="2" preCellId="../IT_L6/11/CELL_IT" postCellId="../PV_L6/5/CELL_PV" weight="0.0265" delay="4.121724310535949 ms"/>
            <connectionWD id="3" preCellId="../IT_L6/13/CELL_IT" postCellId="../PV_L6/6/CELL_PV" weight="0.0265" delay="2.3752649457597945 ms"/>
        </projection>
        <projection id="NetConn_IT_L5A_SOM_L6_AMPA" presynapticPopulation="IT_L5A" postsynapticPopulation="SOM_L6" synapse="AMPA">
            <connectionWD id="0" preCellId="../IT_L5A/28/CELL_IT" postCellId="../SOM_L6/0/CELL_SOM" weight="0.021875" delay="8.134848112802949 ms"/>
            <connectionWD id="1" preCellId="../IT_L5A/23/CELL_IT" postCellId="../SOM_L6/4/CELL_SOM" weight="0.021875" delay="8.247688279197238 ms"/>
            <connectionWD id="2" preCellId="../IT_L5A/7/CELL_IT" postCellId="../SOM_L6/6/CELL_SOM" weight="0.021875" delay="7.878291536582857 ms"/>
            <connectionWD id="3" preCellId="../IT_L5A/15/CELL_IT" postCellId="../SOM_L6/6/CELL_SOM" weight="0.021875" delay="7.20918034192683 ms"/>
        </projection>
        <projection id="NetConn_CT_L6_SOM_L6_AMPA" presynapticPopulation="CT_L6" postsynapticPopulation="SOM_L6" synapse="AMPA">
            <connectionWD id="0" preCellId="../CT_L6/8/CELL_CT" postCellId="../SOM_L6/0/CELL_SOM" weight="0.0265" delay="3.8778087762538815 ms"/>
            <connectionWD id="1" preCellId="../CT_L6/1/CELL_CT" postCellId="../SOM_L6/2/CELL_SOM" weight="0.0265" delay="2.350378105584471 ms"/>
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        </projection>
        <projection id="NetConn_SOM_L6_SOM_L6_GABAB" presynapticPopulation="SOM_L6" postsynapticPopulation="SOM_L6" synapse="GABAB">
            <connectionWD id="0" preCellId="../SOM_L6/1/CELL_SOM" postCellId="../SOM_L6/0/CELL_SOM" weight="0.025" delay="2.074352210015039 ms"/>
            <connectionWD id="1" preCellId="../SOM_L6/2/CELL_SOM" postCellId="../SOM_L6/0/CELL_SOM" weight="0.025" delay="2.9053844174317622 ms"/>
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        </projection>
        <projection id="NetConn_PV_L6_SOM_L6_GABAA" presynapticPopulation="PV_L6" postsynapticPopulation="SOM_L6" synapse="GABAA">
            <connectionWD id="0" preCellId="../PV_L6/4/CELL_PV" postCellId="../SOM_L6/0/CELL_SOM" weight="0.025" delay="2.361809542191557 ms"/>
            <connectionWD id="1" preCellId="../PV_L6/0/CELL_PV" postCellId="../SOM_L6/1/CELL_SOM" weight="0.025" delay="3.0479977203431767 ms"/>
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        </projection>
        <projection id="NetConn_IT_L4_SOM_L6_AMPA" presynapticPopulation="IT_L4" postsynapticPopulation="SOM_L6" synapse="AMPA">
            <connectionWD id="0" preCellId="../IT_L4/14/CELL_IT" postCellId="../SOM_L6/1/CELL_SOM" weight="0.021875" delay="9.328511847098607 ms"/>
            <connectionWD id="1" preCellId="../IT_L4/21/CELL_IT" postCellId="../SOM_L6/4/CELL_SOM" weight="0.021875" delay="8.923729400505064 ms"/>
        </projection>
        <projection id="NetConn_IT_L5B_SOM_L6_AMPA" presynapticPopulation="IT_L5B" postsynapticPopulation="SOM_L6" synapse="AMPA">
            <connectionWD id="0" preCellId="../IT_L5B/6/CELL_IT" postCellId="../SOM_L6/1/CELL_SOM" weight="0.021875" delay="4.440057737997635 ms"/>
            <connectionWD id="1" preCellId="../IT_L5B/11/CELL_IT" postCellId="../SOM_L6/3/CELL_SOM" weight="0.021875" delay="4.997404021124515 ms"/>
            <connectionWD id="2" preCellId="../IT_L5B/16/CELL_IT" postCellId="../SOM_L6/4/CELL_SOM" weight="0.021875" delay="4.25021693078023 ms"/>
            <connectionWD id="3" preCellId="../IT_L5B/6/CELL_IT" postCellId="../SOM_L6/5/CELL_SOM" weight="0.021875" delay="2.7734584729975187 ms"/>
        </projection>
        <projection id="NetConn_PT_L5B_SOM_L6_AMPA" presynapticPopulation="PT_L5B" postsynapticPopulation="SOM_L6" synapse="AMPA">
            <connectionWD id="0" preCellId="../PT_L5B/3/CELL_PT" postCellId="../SOM_L6/1/CELL_SOM" weight="0.021875" delay="6.825571073977128 ms"/>
            <connectionWD id="1" preCellId="../PT_L5B/18/CELL_PT" postCellId="../SOM_L6/2/CELL_SOM" weight="0.021875" delay="5.9778215263083325 ms"/>
            <connectionWD id="2" preCellId="../PT_L5B/31/CELL_PT" postCellId="../SOM_L6/2/CELL_SOM" weight="0.021875" delay="5.910522705011593 ms"/>
            <connectionWD id="3" preCellId="../PT_L5B/22/CELL_PT" postCellId="../SOM_L6/5/CELL_SOM" weight="0.021875" delay="2.626324869456334 ms"/>
        </projection>
        <projection id="NetConn_IT_L6_SOM_L6_AMPA" presynapticPopulation="IT_L6" postsynapticPopulation="SOM_L6" synapse="AMPA">
            <connectionWD id="0" preCellId="../IT_L6/14/CELL_IT" postCellId="../SOM_L6/3/CELL_SOM" weight="0.0265" delay="2.9873882160352654 ms"/>
            <connectionWD id="1" preCellId="../IT_L6/6/CELL_IT" postCellId="../SOM_L6/6/CELL_SOM" weight="0.0265" delay="2.252110150926143 ms"/>
            <connectionWD id="2" preCellId="../IT_L6/7/CELL_IT" postCellId="../SOM_L6/6/CELL_SOM" weight="0.0265" delay="2.3657977823522254 ms"/>
        </projection>
        <projection id="NetConn_NetStim_background_E_IT_L23_20_1_NMDA__IT_L23" presynapticPopulation="Pop_NetStim_background_E_IT_L23_20_1_NMDA" postsynapticPopulation="IT_L23" synapse="NMDA">
            <connectionWD id="0" preCellId="../Pop_NetStim_background_E_IT_L23_20_1_NMDA[0]" postCellId="../IT_L23/0/CELL_IT" weight="0.1" delay="9.523512351126222 ms"/>
            <connectionWD id="1" preCellId="../Pop_NetStim_background_E_IT_L23_20_1_NMDA[1]" postCellId="../IT_L23/1/CELL_IT" weight="0.1" delay="7.921234190871875 ms"/>
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        </projection>
        <projection id="NetConn_NetStim_background_E_IT_L4_20_1_NMDA__IT_L4" presynapticPopulation="Pop_NetStim_background_E_IT_L4_20_1_NMDA" postsynapticPopulation="IT_L4" synapse="NMDA">
            <connectionWD id="0" preCellId="../Pop_NetStim_background_E_IT_L4_20_1_NMDA[0]" postCellId="../IT_L4/0/CELL_IT" weight="0.1" delay="7.407343133847954 ms"/>
            <connectionWD id="1" preCellId="../Pop_NetStim_background_E_IT_L4_20_1_NMDA[1]" postCellId="../IT_L4/1/CELL_IT" weight="0.1" delay="3.8269492530815388 ms"/>
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        </projection>
        <projection id="NetConn_NetStim_background_E_IT_L5A_20_1_NMDA__IT_L5A" presynapticPopulation="Pop_NetStim_background_E_IT_L5A_20_1_NMDA" postsynapticPopulation="IT_L5A" synapse="NMDA">
            <connectionWD id="0" preCellId="../Pop_NetStim_background_E_IT_L5A_20_1_NMDA[0]" postCellId="../IT_L5A/0/CELL_IT" weight="0.1" delay="4.7109378541611635 ms"/>
            <connectionWD id="1" preCellId="../Pop_NetStim_background_E_IT_L5A_20_1_NMDA[1]" postCellId="../IT_L5A/1/CELL_IT" weight="0.1" delay="6.240631890606348 ms"/>
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        </projection>
        <projection id="NetConn_NetStim_background_E_IT_L5B_20_1_NMDA__IT_L5B" presynapticPopulation="Pop_NetStim_background_E_IT_L5B_20_1_NMDA" postsynapticPopulation="IT_L5B" synapse="NMDA">
            <connectionWD id="0" preCellId="../Pop_NetStim_background_E_IT_L5B_20_1_NMDA[0]" postCellId="../IT_L5B/0/CELL_IT" weight="0.1" delay="7.485572125190325 ms"/>
            <connectionWD id="1" preCellId="../Pop_NetStim_background_E_IT_L5B_20_1_NMDA[1]" postCellId="../IT_L5B/1/CELL_IT" weight="0.1" delay="4.191455173694229 ms"/>
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        </projection>
        <projection id="NetConn_NetStim_background_E_PT_L5B_20_1_NMDA__PT_L5B" presynapticPopulation="Pop_NetStim_background_E_PT_L5B_20_1_NMDA" postsynapticPopulation="PT_L5B" synapse="NMDA">
            <connectionWD id="0" preCellId="../Pop_NetStim_background_E_PT_L5B_20_1_NMDA[0]" postCellId="../PT_L5B/0/CELL_PT" weight="0.1" delay="3.453734180416266 ms"/>
            <connectionWD id="1" preCellId="../Pop_NetStim_background_E_PT_L5B_20_1_NMDA[1]" postCellId="../PT_L5B/1/CELL_PT" weight="0.1" delay="2.3225851284126495 ms"/>
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        </projection>
        <projection id="NetConn_NetStim_background_E_IT_L6_20_1_NMDA__IT_L6" presynapticPopulation="Pop_NetStim_background_E_IT_L6_20_1_NMDA" postsynapticPopulation="IT_L6" synapse="NMDA">
            <connectionWD id="0" preCellId="../Pop_NetStim_background_E_IT_L6_20_1_NMDA[0]" postCellId="../IT_L6/0/CELL_IT" weight="0.1" delay="2.9328686361452996 ms"/>
            <connectionWD id="1" preCellId="../Pop_NetStim_background_E_IT_L6_20_1_NMDA[1]" postCellId="../IT_L6/1/CELL_IT" weight="0.1" delay="5.805051425024068 ms"/>
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        </projection>
        <projection id="NetConn_NetStim_background_E_CT_L6_20_1_NMDA__CT_L6" presynapticPopulation="Pop_NetStim_background_E_CT_L6_20_1_NMDA" postsynapticPopulation="CT_L6" synapse="NMDA">
            <connectionWD id="0" preCellId="../Pop_NetStim_background_E_CT_L6_20_1_NMDA[0]" postCellId="../CT_L6/0/CELL_CT" weight="0.1" delay="5.969676127904408 ms"/>
            <connectionWD id="1" preCellId="../Pop_NetStim_background_E_CT_L6_20_1_NMDA[1]" postCellId="../CT_L6/1/CELL_CT" weight="0.1" delay="5.422929571965804 ms"/>
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        </projection>
        <projection id="NetConn_NetStim_background_E_PV_L23_20_1_NMDA__PV_L23" presynapticPopulation="Pop_NetStim_background_E_PV_L23_20_1_NMDA" postsynapticPopulation="PV_L23" synapse="NMDA">
            <connectionWD id="0" preCellId="../Pop_NetStim_background_E_PV_L23_20_1_NMDA[0]" postCellId="../PV_L23/0/CELL_PV" weight="0.05" delay="6.300701187392948 ms"/>
            <connectionWD id="1" preCellId="../Pop_NetStim_background_E_PV_L23_20_1_NMDA[1]" postCellId="../PV_L23/1/CELL_PV" weight="0.05" delay="7.503335166470146 ms"/>
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        </projection>
        <projection id="NetConn_NetStim_background_E_SOM_L23_20_1_NMDA__SOM_L23" presynapticPopulation="Pop_NetStim_background_E_SOM_L23_20_1_NMDA" postsynapticPopulation="SOM_L23" synapse="NMDA">
            <connectionWD id="0" preCellId="../Pop_NetStim_background_E_SOM_L23_20_1_NMDA[0]" postCellId="../SOM_L23/0/CELL_SOM" weight="0.03" delay="4.619794037889618 ms"/>
            <connectionWD id="1" preCellId="../Pop_NetStim_background_E_SOM_L23_20_1_NMDA[1]" postCellId="../SOM_L23/1/CELL_SOM" weight="0.03" delay="2.5937601387323084 ms"/>
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        </projection>
        <projection id="NetConn_NetStim_background_E_PV_L5_20_1_NMDA__PV_L5" presynapticPopulation="Pop_NetStim_background_E_PV_L5_20_1_NMDA" postsynapticPopulation="PV_L5" synapse="NMDA">
            <connectionWD id="0" preCellId="../Pop_NetStim_background_E_PV_L5_20_1_NMDA[0]" postCellId="../PV_L5/0/CELL_PV" weight="0.05" delay="2.4503338834987827 ms"/>
            <connectionWD id="1" preCellId="../Pop_NetStim_background_E_PV_L5_20_1_NMDA[1]" postCellId="../PV_L5/1/CELL_PV" weight="0.05" delay="4.8468980071287024 ms"/>
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        </projection>
        <projection id="NetConn_NetStim_background_E_SOM_L5_20_1_NMDA__SOM_L5" presynapticPopulation="Pop_NetStim_background_E_SOM_L5_20_1_NMDA" postsynapticPopulation="SOM_L5" synapse="NMDA">
            <connectionWD id="0" preCellId="../Pop_NetStim_background_E_SOM_L5_20_1_NMDA[0]" postCellId="../SOM_L5/0/CELL_SOM" weight="0.03" delay="4.483181937901739 ms"/>
            <connectionWD id="1" preCellId="../Pop_NetStim_background_E_SOM_L5_20_1_NMDA[1]" postCellId="../SOM_L5/1/CELL_SOM" weight="0.03" delay="4.01765877802844 ms"/>
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        </projection>
        <projection id="NetConn_NetStim_background_E_PV_L6_20_1_NMDA__PV_L6" presynapticPopulation="Pop_NetStim_background_E_PV_L6_20_1_NMDA" postsynapticPopulation="PV_L6" synapse="NMDA">
            <connectionWD id="0" preCellId="../Pop_NetStim_background_E_PV_L6_20_1_NMDA[0]" postCellId="../PV_L6/0/CELL_PV" weight="0.05" delay="8.295486154548488 ms"/>
            <connectionWD id="1" preCellId="../Pop_NetStim_background_E_PV_L6_20_1_NMDA[1]" postCellId="../PV_L6/1/CELL_PV" weight="0.05" delay="6.483273644566038 ms"/>
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        </projection>
        <projection id="NetConn_NetStim_background_E_SOM_L6_20_1_NMDA__SOM_L6" presynapticPopulation="Pop_NetStim_background_E_SOM_L6_20_1_NMDA" postsynapticPopulation="SOM_L6" synapse="NMDA">
            <connectionWD id="0" preCellId="../Pop_NetStim_background_E_SOM_L6_20_1_NMDA[0]" postCellId="../SOM_L6/0/CELL_SOM" weight="0.03" delay="3.8571430202257098 ms"/>
            <connectionWD id="1" preCellId="../Pop_NetStim_background_E_SOM_L6_20_1_NMDA[1]" postCellId="../SOM_L6/1/CELL_SOM" weight="0.03" delay="3.2851347262242614 ms"/>
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        </projection>
    </network>
</neuroml>
