<neuroml xmlns="http://www.neuroml.org/schema/neuroml2"  xmlns:xs="http://www.w3.org/2001/XMLSchema" xmlns:xsi="http://www.w3.org/2001/XMLSchema-instance" xsi:schemaLocation="http://www.neuroml.org/schema/neuroml2 https://raw.github.com/NeuroML/NeuroML2/development/Schemas/NeuroML2/NeuroML_v2beta5.xsd" id="Balanced">
    <notes>

This NeuroML 2 file was generated by OpenCortex v0.0.7 using:
    libNeuroML v0.2.25
    pyNeuroML v0.2.5

    </notes>
    <property tag="Python random seed" value="1234"/>
    <include href="Balanced/HH_464198958.cell.nml"></include>
    <include href="Balanced/IM.channel.nml"></include>
    <include href="Balanced/Kd.channel.nml"></include>
    <include href="Balanced/Leak.channel.nml"></include>
    <include href="Balanced/Na.channel.nml"></include>
    <include href="Balanced/HH_471141261.cell.nml"></include>
    <include href="Balanced/IM.channel.nml"></include>
    <include href="Balanced/Kd.channel.nml"></include>
    <include href="Balanced/Leak.channel.nml"></include>
    <include href="Balanced/Na.channel.nml"></include>
    <expTwoSynapse id="synAmpa1" gbase="1nS" erev="0mV" tauDecay="5ms" tauRise="0.5ms"/>
    <expTwoSynapse id="synGaba1" gbase="2nS" erev="-80mV" tauDecay="20ms" tauRise="1ms"/>
    <poissonFiringSynapse id="psf1" averageRate="150 Hz" synapse="synAmpa1" spikeTarget="./synAmpa1"/>
    <network id="Balanced" type="networkWithTemperature" temperature="32degC">
        <population id="popExc" component="HH_464198958" size="80" type="populationList">
            <instance id="0">
                <location x="186.581414276999993" y="70.366299587699999" z="102.247441018000004"/>
            </instance>
            <instance id="1">
                <location x="164.390384979999993" y="319.634498682000014" z="274.668271918000016"/>
            </instance>
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        </population>
        <population id="popInh" component="HH_471141261" size="40" type="populationList">
            <instance id="0">
                <location x="-134.986282950999993" y="99.708014297999995" z="382.014422138999976"/>
            </instance>
            <instance id="1">
                <location x="180.073079441999994" y="-80.0306592962" z="259.694135091000021"/>
            </instance>
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        </population>
        <projection id="proj0_popExc_popExc" presynapticPopulation="popExc" postsynapticPopulation="popExc" synapse="synAmpa1">
            <connectionWD id="0" preCellId="../popExc/0/HH_464198958" postCellId="../popExc/9/HH_464198958" weight="1." delay="2 ms"/>
            <connectionWD id="1" preCellId="../popExc/0/HH_464198958" postCellId="../popExc/10/HH_464198958" weight="1." delay="2 ms"/>
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        </projection>
        <projection id="proj1_popExc_popInh" presynapticPopulation="popExc" postsynapticPopulation="popInh" synapse="synAmpa1">
            <connectionWD id="0" preCellId="../popExc/0/HH_464198958" postCellId="../popInh/0/HH_471141261" weight="1." delay="2 ms"/>
            <connectionWD id="1" preCellId="../popExc/0/HH_464198958" postCellId="../popInh/3/HH_471141261" weight="1." delay="2 ms"/>
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        </projection>
        <projection id="proj3_popInh_popExc" presynapticPopulation="popInh" postsynapticPopulation="popExc" synapse="synGaba1">
            <connectionWD id="0" preCellId="../popInh/0/HH_471141261" postCellId="../popExc/0/HH_464198958" weight="1." delay="2 ms"/>
            <connectionWD id="1" preCellId="../popInh/0/HH_471141261" postCellId="../popExc/1/HH_464198958" weight="1." delay="2 ms"/>
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        </projection>
        <projection id="proj4_popInh_popInh" presynapticPopulation="popInh" postsynapticPopulation="popInh" synapse="synGaba1">
            <connectionWD id="0" preCellId="../popInh/0/HH_471141261" postCellId="../popInh/1/HH_471141261" weight="1." delay="2 ms"/>
            <connectionWD id="1" preCellId="../popInh/0/HH_471141261" postCellId="../popInh/3/HH_471141261" weight="1." delay="2 ms"/>
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        </projection>
        <inputList id="Stim0" population="popExc" component="psf1">
            <input id="0" target="../popExc/0/HH_464198958" destination="synapses"/>
            <input id="1" target="../popExc/1/HH_464198958" destination="synapses"/>
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        </inputList>
    </network>
</neuroml>
